** 1/3 des Modells zum presshaerten eines Hutprofils
** Loesungsstrategie: Implizit
** Verfahrensschritte: Aufwaermen - Platine klemmen
*Heading
** Job name: WTP-M1_WS950.0_WZ120.0 Model name: Model-1_implizit
** Generated by: Abaqus/CAE 2021.HFs8
*Preprint, echo=NO, model=NO, history=NO, contact=NO
**
** PARTS
**
*Part, name=Platine
*Node
      1,         -41.,         1.75,           0.
      2,         -41.,         1.75,         0.75
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*Element, type=C3D8T
 1, 158, 226, 225,  25,   1,   2,   3,   4
 2, 157, 227, 224,  26, 158, 226, 225,  25
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*Nset, nset=Platine, generate
    1,  1008,     1
*Elset, elset=Platine, generate
   1,  334,    1
** Section: Platine_Solidsection
*Solid Section, elset=Platine, material=Stahlblech_22MnB5_Al-Si
,
*End Part
**
*Part, name=WZ_Matrize
*Node
      1,   -35.394886,   24.1473389,   0.75999999
      2,  -32.7617302,    24.584589,   0.75999999
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*Element, type=C3D8T
1, 178, 177,   2,   1, 179, 180,   5,   6
2,   4,   3, 177, 178,   7,   8, 180, 179
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*Node
    765,           0.,       -36.25,   0.75999999
*Nset, nset=WZ_Matrize-RefPt_, internal
765,
*Nset, nset=Matrize, generate
   1,  764,    1
*Elset, elset=Matrize, generate
   1,  317,    1
** Section: Werkzeugstahl_Solidsection
*Solid Section, elset=Matrize, material=Werkzeugstahl_1_2367
,
*End Part
**
*Part, name=WZ_Stempel
*Node
      1,   6.92490911,  -31.3600006,   0.75999999
      2,   1.49205434,  -31.3600006,   0.75999999
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*Element, type=C3D8T
1, 156, 155,   2,   1, 158, 157,   7,   8
2,   4,   3, 155, 156,   5,   6, 157, 158
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*Node
    563,   6.92490911,       -38.75,   0.75999999
*Nset, nset=WZ_Stempel-RefPt_, internal
563,
*Nset, nset=Stempel, generate
   1,  562,    1
*Elset, elset=Stempel, generate
   1,  219,    1
** Section: Werkzeugstahl_Solidsection
*Solid Section, elset=Stempel, material=Werkzeugstahl_1_2367
,
*End Part
**
**
** ASSEMBLY
**
*Assembly, name=Assembly
**
*Instance, name=Platine-1, part=Platine
        -10.,         72.5,        -0.75
*End Instance
**
*Instance, name=WZ_Matrize-1, part=WZ_Matrize
          0.,        34.75,        -0.76
*End Instance
**
*Instance, name=WZ_Stempel-1, part=WZ_Stempel
-6.924909294825,       118.75,        -0.76
*End Instance
**
*Nset, nset=Platine_Auflage, instance=Platine-1
 13, 14
*Elset, elset=Platine_Auflage, instance=Platine-1
 145, 236
*Nset, nset=Platine_Auswerfer, instance=Platine-1
 10, 11
*Elset, elset=Platine_Auswerfer, instance=Platine-1
 144, 312
*Nset, nset=Platine_Gegenkraft, instance=Platine-1
 13, 14
*Nset, nset=Platine_Scheibenschnitt-1, instance=Platine-1
   2,   3,   5,   6,   9,  10
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*Elset, elset=Platine_Scheibenschnitt-1, instance=Platine-1, generate
   1,  334,    1
*Nset, nset=Platine_Scheibenschnitt-2, instance=Platine-1
    1,    4,    7,    8,   11,   12
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*Elset, elset=Platine_Scheibenschnitt-2, instance=Platine-1, generate
   1,  334,    1
*Nset, nset=Platine_mittenschnitt, instance=Platine-1
  5,  6,  7,  8, 15, 16
*Elset, elset=Platine_mittenschnitt, instance=Platine-1
  68, 212
*Nset, nset=RP_Matrize, instance=WZ_Matrize-1
 765,
*Nset, nset=RP_Stempel, instance=WZ_Stempel-1
 563,
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*Elset, elset=WZ_All, instance=WZ_Matrize-1, generate
   1,  317,    1
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*Elset, elset=_Matrize_Kontakt_S4, internal, instance=WZ_Matrize-1
 116, 117, 118, 119, 120, 121
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*Elset, elset=_Matrize_Kontakt_S6, internal, instance=WZ_Matrize-1, generate
 152,  162,    1
*Surface, type=ELEMENT, name=Matrize_Kontakt
_Matrize_Kontakt_S4, S4
_Matrize_Kontakt_S6, S6
*Elset, elset=_Platine_oben_S5, internal, instance=Platine-1, generate
   1,  144,    1
*Elset, elset=_Platine_oben_S1, internal, instance=Platine-1, generate
 312,  334,    1
*Surface, type=ELEMENT, name=Platine_oben
_Platine_oben_S5, S5
_Platine_oben_S1, S1
*Elset, elset=_Platine_oben_unten_S5, internal, instance=Platine-1
   1,   2,   3,   4,   5,   6
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*Elset, elset=_Platine_oben_unten_S2, internal, instance=Platine-1
 145, 146, 147, 148, 149, 150
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*Elset, elset=_Platine_oben_unten_S1, internal, instance=Platine-1, generate
 312,  334,    1
*Surface, type=ELEMENT, name=Platine_oben_unten
_Platine_oben_unten_S5, S5
_Platine_oben_unten_S2, S2
_Platine_oben_unten_S1, S1
*Elset, elset=_Platine_unten_S2, internal, instance=Platine-1
 145, 146, 147, 148, 149, 150
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*Elset, elset=_Platine_unten_S5, internal, instance=Platine-1, generate
 213,  235,    1
*Surface, type=ELEMENT, name=Platine_unten
_Platine_unten_S2, S2
_Platine_unten_S5, S5
*Elset, elset=_Stempel_Kontakt_S5, internal, instance=WZ_Stempel-1, generate
 102,  149,    1
*Surface, type=ELEMENT, name=Stempel_Kontakt
_Stempel_Kontakt_S5, S5
** Constraint: RB_Matrize
*Rigid Body, ref node=RP_Matrize, elset=WZ_Matrize-1.Matrize
** Constraint: RB_Stempel
*Rigid Body, ref node=RP_Stempel, elset=WZ_Stempel-1.Stempel
*End Assembly
**
** MATERIALS
**
*Material, name=Stahlblech_22MnB5_Al-Si
*Conductivity
 30.7,  20.
 31.1, 100.
  30., 200.
 27.5, 300.
 21.7, 400.
 23.6, 600.
 25.6, 800.
 27.6,1000.
*Density
 7.83e-09,
*Elastic
212000., 0.284,   20.
207000., 0.286,  100.
199000., 0.289,  200.
193000., 0.293,  300.
166000., 0.298,  400.
158000., 0.303,  500.
150000.,  0.31,  600.
142000., 0.317,  700.
134000., 0.325,  800.
126000., 0.334,  900.
118000., 0.343, 1000.
*Expansion, zero=20.
 1.3e-05,
*Specific Heat
 4.44e+08,  20.
 4.87e+08, 100.
  5.2e+08, 200.
 5.44e+08, 300.
 5.61e+08, 400.
 5.73e+08, 500.
 5.81e+08, 600.
 5.86e+08, 700.
  5.9e+08, 800.
 5.96e+08, 900.
 6.03e+08,1000.
*Material, name=Werkzeugstahl_1_2367
*Conductivity
 29.8, 20.
 33.9,350.
 35.3,700.
*Density
 7.9e-09,
*Elastic
210000., 0.3
*Specific Heat
 5.033e+08,
**
** INTERACTION PROPERTIES
**
*Surface Interaction, name=Kontakt_WS-WZ
1.,
*Friction, slip tolerance=0.005
 0.45,
*Gap Conductance
 0.708,  0.
 0.548, 0.1
 0.437, 0.2
  0.36, 0.3
 0.306, 0.4
 0.268, 0.5
 0.242, 0.6
 0.224, 0.7
 0.211, 0.8
 0.202, 0.9
 0.196,  1.
 0.192, 1.1
 0.189, 1.2
 0.187, 1.3
 0.185, 1.4
 0.184, 1.5
 0.183, 1.6
 0.183, 1.7
 0.183, 1.8
 0.182, 1.9
 0.182,  2.
    0.,  3.
*Gap Conductance, pressure
 0.609, 0.
 2.371, 2.
 2.537, 4.
 2.642, 6.
 2.719, 8.
 2.781,10.
 2.833,12.
 2.878,14.
 2.918,16.
 2.954,18.
 2.986,20.
 3.016,22.
 3.043,24.
 3.068,26.
 3.092,28.
 3.115,30.
 3.136,32.
 3.156,34.
 3.175,36.
 3.193,38.
  3.21,40.
*Gap Heat Generation
1., 0.5
**
** PHYSICAL CONSTANTS
**
*Physical Constants, absolute zero=-273.15, stefan boltzmann=5.67037e-11
**
** BOUNDARY CONDITIONS
**
** Name: Platine_Mitte Type: Displacement/Rotation
*Boundary
Platine_mittenschnitt, 1, 1
** Name: Platine_Scheibenschnitt-1 Type: Displacement/Rotation
*Boundary
Platine_Scheibenschnitt-1, 3, 3
** Name: WZ_Matrize Type: Displacement/Rotation
*Boundary
RP_Matrize, 1, 1
RP_Matrize, 2, 2
RP_Matrize, 3, 3
RP_Matrize, 4, 4
RP_Matrize, 5, 5
RP_Matrize, 6, 6
** Name: WZ_Stempel Type: Displacement/Rotation
*Boundary
RP_Stempel, 1, 1
RP_Stempel, 2, 2
RP_Stempel, 3, 3
RP_Stempel, 4, 4
RP_Stempel, 5, 5
RP_Stempel, 6, 6
**
** PREDEFINED FIELDS
**
** Name: Starttemperatur_Matrize   Type: Temperature
*Initial Conditions, type=TEMPERATURE
WZ_Matrize-1.Matrize, 120.0
** Name: Starttemperatur_Platine   Type: Temperature
*Initial Conditions, type=TEMPERATURE
Platine-1.Platine, 20.
** Name: Starttemperatur_Stempel   Type: Temperature
*Initial Conditions, type=TEMPERATURE
WZ_Stempel-1.Stempel, 120.0
**
** INTERACTIONS
**
** Interaction: Surf2Surf_oben
*Contact Pair, interaction=Kontakt_WS-WZ, type=SURFACE TO SURFACE
Platine_oben, Stempel_Kontakt
** Interaction: Surf2Surf_unten
*Contact Pair, interaction=Kontakt_WS-WZ, type=SURFACE TO SURFACE
Platine_unten, Matrize_Kontakt
** ----------------------------------------------------------------
**
** STEP: Step-1
**
*Step, name=Step-1, nlgeom=NO, inc=80
Aufwaermen der Platine
*Coupled Temperature-displacement, creep=none, deltmx=20.
6., 360., 0.6, 6.
**
** BOUNDARY CONDITIONS
**
** Name: Platine_Auflage Type: Displacement/Rotation
*Boundary
Platine_Auflage, 2, 2
** Name: Platine_Scheibenschnitt-1 Type: Displacement/Rotation
*Boundary
Platine_Scheibenschnitt-1, 3, 3, -0.002
** Name: WZ_Matrize Type: Displacement/Rotation
*Boundary
RP_Matrize, 1, 1, -0.04
**
** LOADS
**
** Name: Waermequelle   Type: Body heat flux
*Dflux
Platine-1.Platine, BF, 11.922521090894438
**
** INTERACTIONS
**
** Interaction: Surf2Surf_oben
*Model Change, type=CONTACT PAIR, remove
Platine_oben, Stempel_Kontakt
** Interaction: Surf2Surf_unten
*Model Change, type=CONTACT PAIR, remove
Platine_unten, Matrize_Kontakt
**
** OUTPUT REQUESTS
**
*Restart, write, frequency=0
**
** FIELD OUTPUT: F-Output-1
**
*Output, field
*Node Output
CF, NT, RF, RFL, U
*Element Output, directions=YES
E, HFL, S, TEMP
*Contact Output
CDISP, CSTRESS
**
** HISTORY OUTPUT: H-Output-1
**
*Output, history, variable=PRESELECT
*End Step
** ----------------------------------------------------------------
**
** STEP: Step-2
**
*Step, name=Step-2, nlgeom=NO, inc=30
Transfer der Platine
*Coupled Temperature-displacement, creep=none, deltmx=10.
0.35, 7., 0.035, 0.35
**
** LOADS
**
** Name: Waermequelle   Type: Body heat flux
*Dflux, op=NEW
**
** INTERACTIONS
**
** Interaction: Platine_Konvektion_oben
*Sfilm
Platine_oben, F, 20., 0.00968
** Interaction: Platine_Konvektion_unten
*Sfilm
Platine_unten, F, 20., 0.00484
** Interaction: Platine_Radiation
*Sradiate
Platine_oben_unten, R, 20., 0.75
**
** OUTPUT REQUESTS
**
*Restart, write, frequency=0
**
** FIELD OUTPUT: F-Output-1
**
*Output, field
*Node Output
CF, NT, RF, RFL, U
*Element Output, directions=YES
E, HFL, S, TEMP
*Contact Output
CDISP, CSTRESS
**
** HISTORY OUTPUT: H-Output-1
**
*Output, history, variable=PRESELECT
*End Step
** ----------------------------------------------------------------
**
** STEP: Step-3
**
*Step, name=Step-3, nlgeom=NO, inc=5
Kontaktaufbringung Platine/Stempel
*Coupled Temperature-displacement, creep=none, deltmx=10.
0.029, 0.03, 3e-07, 0.03
**
** BOUNDARY CONDITIONS
**
** Name: WZ_Stempel Type: Displacement/Rotation
*Boundary
RP_Stempel, 2, 2, -5.05
**
** INTERACTIONS
**
** Interaction: Surf2Surf_oben
*Model Change, type=CONTACT PAIR, add
Platine_oben, Stempel_Kontakt
**
** OUTPUT REQUESTS
**
*Restart, write, frequency=0
**
** FIELD OUTPUT: F-Output-1
**
*Output, field
*Node Output
CF, NT, RF, RFL, U
*Element Output, directions=YES
E, HFL, S, TEMP
*Contact Output
CDISP, CSTRESS
**
** HISTORY OUTPUT: H-Output-1
**
*Output, history, variable=PRESELECT
*End Step
** ----------------------------------------------------------------
**
** STEP: Step-4
**
*Step, name=Step-4, nlgeom=NO, inc=20
Kontaktaufbringung Platine/Matrize
*Coupled Temperature-displacement, creep=none, deltmx=10.
0.0291, 0.03, 3e-07, 0.03
**
** BOUNDARY CONDITIONS
**
** Name: Platine_Auflage Type: Displacement/Rotation
*Boundary, op=NEW
** Name: Platine_Mitte Type: Displacement/Rotation
*Boundary, op=NEW
Platine_mittenschnitt, 1, 1
** Name: Platine_Scheibenschnitt-1 Type: Displacement/Rotation
*Boundary, op=NEW
Platine_Scheibenschnitt-1, 3, 3, -0.002
** Name: WZ_Matrize Type: Displacement/Rotation
*Boundary, op=NEW
RP_Matrize, 1, 1, -0.04
RP_Matrize, 2, 2
RP_Matrize, 3, 3
RP_Matrize, 4, 4
RP_Matrize, 5, 5
RP_Matrize, 6, 6
** Name: WZ_Stempel Type: Displacement/Rotation
*Boundary, op=NEW
RP_Stempel, 1, 1
RP_Stempel, 2, 2, -10.1
RP_Stempel, 3, 3
RP_Stempel, 4, 4
RP_Stempel, 5, 5
RP_Stempel, 6, 6
**
** LOADS
**
** Name: Gegenkraft   Type: Concentrated force
*Cload
Platine_Gegenkraft, 2, 0.001
**
** INTERACTIONS
**
** Interaction: Surf2Surf_unten
*Model Change, type=CONTACT PAIR, add
Platine_unten, Matrize_Kontakt
**
** OUTPUT REQUESTS
**
*Restart, write, frequency=1
**
** FIELD OUTPUT: F-Output-1
**
*Output, field
*Node Output
CF, NT, RF, RFL, U
*Element Output, directions=YES
E, HFL, S, TEMP
*Contact Output
CDISP, CSTRESS
**
** HISTORY OUTPUT: H-Output-1
**
*Output, history, variable=PRESELECT
*End Step
