** 2/3 des Modells zum presshaerten eines Hutprofils
** Loesungsstrategie: Explizit
** Verfahrensschritte: Umformen + Nachdruecken
*Heading
** Job name: WTP-M2_WS1000.0_WZ170.0_p11.0 Model name: Model-2_explizit
** Generated by: Abaqus/CAE 2021.HF8
*Preprint, echo=NO, model=NO, history=NO, contact=NO
**
** PARTS
**
**
** ASSEMBLY
**
*Assembly, name=Assembly
**
*Instance, library=WTP-M1_WS1000.0_WZ170.0, instance=Platine-1
**
** PREDEFINED FIELD
**
** Name: IMORT_Model-1   Type: Initial State
*Import, state=yes, update=no
*End Instance
**
*Instance, library=WTP-M1_WS1000.0_WZ170.0, instance=WZ_Matrize-1
**
** PREDEFINED FIELD
**
** Name: IMORT_Model-1   Type: Initial State
*Import, state=yes, update=no
*End Instance
**
*Instance, library=WTP-M1_WS1000.0_WZ170.0, instance=WZ_Stempel-1
**
** PREDEFINED FIELD
**
** Name: IMORT_Model-1   Type: Initial State
*Import, state=yes, update=no
*End Instance
**
*Elset, elset=Mass-scaling-Elemente, instance=WZ_Stempel-1
 10, 11, 12, 13, 14, 15, 16, 17, 85, 86, 87, 88, 89, 90, 91, 92
*Elset, elset=Mass-scaling-Elemente, instance=WZ_Matrize-1, generate
 60,  67,   1
*Nset, nset=Platine_Auflage, instance=Platine-1
 13, 14
*Elset, elset=Platine_Auflage, instance=Platine-1
 145, 236
*Nset, nset=Platine_Auswerfer, instance=Platine-1
 10, 11
*Elset, elset=Platine_Auswerfer, instance=Platine-1
 144, 312
*Nset, nset=Platine_Gegenkraft, instance=Platine-1
 13, 14
*Nset, nset=Platine_Scheibenschnitt-1, instance=Platine-1
   2,   3,   5,   6,   9,  10
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*Elset, elset=Platine_Scheibenschnitt-1, instance=Platine-1, generate
   1,  334,    1
*Nset, nset=Platine_Scheibenschnitt-2, instance=Platine-1
    1,    4,    7,    8,   11,   12
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*Elset, elset=Platine_Scheibenschnitt-2, instance=Platine-1, generate
   1,  334,    1
*Nset, nset=Platine_mittenschnitt, instance=Platine-1
  5,  6,  7,  8, 15, 16
*Elset, elset=Platine_mittenschnitt, instance=Platine-1
  68, 212
*Nset, nset=RP_Matrize, instance=WZ_Matrize-1
 765,
*Nset, nset=RP_Stempel, instance=WZ_Stempel-1
 563,
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*Elset, elset=_Matrize_Kontakt_S4, internal, instance=WZ_Matrize-1
 116, 117, 118, 119, 120, 121
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*Elset, elset=_Matrize_Kontakt_S6, internal, instance=WZ_Matrize-1, generate
 152,  162,    1
*Surface, type=ELEMENT, name=Matrize_Kontakt
_Matrize_Kontakt_S4, S4
_Matrize_Kontakt_S6, S6
*Elset, elset=_Platine_oben_S5, internal, instance=Platine-1, generate
   1,  144,    1
*Elset, elset=_Platine_oben_S1, internal, instance=Platine-1, generate
 312,  334,    1
*Surface, type=ELEMENT, name=Platine_oben
_Platine_oben_S5, S5
_Platine_oben_S1, S1
*Elset, elset=_Platine_oben_unten_S5, internal, instance=Platine-1
   1,   2,   3,   4,   5,   6
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*Elset, elset=_Platine_oben_unten_S2, internal, instance=Platine-1
 145, 146, 147, 148, 149, 150
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*Elset, elset=_Platine_oben_unten_S1, internal, instance=Platine-1, generate
 312,  334,    1
*Surface, type=ELEMENT, name=Platine_oben_unten
_Platine_oben_unten_S5, S5
_Platine_oben_unten_S2, S2
_Platine_oben_unten_S1, S1
*Elset, elset=_Platine_unten_S2, internal, instance=Platine-1
 145, 146, 147, 148, 149, 150
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*Elset, elset=_Platine_unten_S5, internal, instance=Platine-1, generate
 213,  235,    1
*Surface, type=ELEMENT, name=Platine_unten
_Platine_unten_S2, S2
_Platine_unten_S5, S5
*Elset, elset=_Stempel_Kontakt_S5, internal, instance=WZ_Stempel-1, generate
 102,  149,    1
*Surface, type=ELEMENT, name=Stempel_Kontakt
_Stempel_Kontakt_S5, S5
*Elset, elset=_WZ_Kopfflaeche_S2, internal, instance=WZ_Stempel-1, generate
 211,  219,    1
*Surface, type=ELEMENT, name=WZ_Kopfflaeche
_WZ_Kopfflaeche_S2, S2
** Constraint: RB_Matrize
*Rigid Body, ref node=RP_Matrize, elset=WZ_Matrize-1.Matrize
** Constraint: RB_Stempel
*Rigid Body, ref node=RP_Stempel, elset=WZ_Stempel-1.Stempel
*End Assembly
*Amplitude, name=Amp-Presskraft
             0.,              0.,            0.01,             0.5,            0.05,              1.
*Amplitude, name=Amp-Stempelweg_Y
             0.,              0.,            0.45,              1.
**
** MATERIALS
**
*Material, name=Stahlblech_22MnB5_Al-Si
*Conductivity
 30.7,  20.
 31.1, 100.
  30., 200.
 27.5, 300.
 21.7, 400.
 23.6, 600.
 25.6, 800.
 27.6,1000.
*Density
 7.83e-09,
*Elastic
212000., 0.284,   20.
207000., 0.286,  100.
199000., 0.289,  200.
193000., 0.293,  300.
166000., 0.298,  400.
158000., 0.303,  500.
150000.,  0.31,  600.
142000., 0.317,  700.
134000., 0.325,  800.
126000., 0.334,  900.
118000., 0.343, 1000.
*Expansion, zero=20.
 1.3e-05,
*Inelastic Heat Fraction
         0.9,
*Plastic, rate=0.
 56.417,  0.,500.
 56.417, 0.0128,   500.
 56.417, 0.0164,   500.
 56.417, 0.021,  500.
 56.417, 0.0268,   500.
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 22.26, 0.3162,   800.
*Plastic, rate=0.1323
 56.417,  0.,500.
 195.56, 0.0128,   500.
 203.845, 0.0164,   500.
 212.602, 0.021,  500.
 221.749, 0.0268,   500.
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 139.08, 0.3162,   800.
*Plastic, rate=0.1749
 56.417,  0.,500.
 202.678, 0.0128,   500.
 211.387, 0.0164,   500.
 220.591, 0.021,  500.
 230.206, 0.0268,   500.
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 147.218, 0.3162,   800.
*Plastic, rate=0.2314
 56.417,  0.,500.
 210.181, 0.0128,   500.
 219.337, 0.0164,   500.
 229.014, 0.021,  500.
 239.122, 0.0268,   500.
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 155.948, 0.3162,   800.
*Plastic, rate=0.306
 56.417,  0.,500.
 218.055, 0.0128,   500.
 227.68, 0.0164,   500.
 237.852, 0.021,  500.
 248.478, 0.0268,   500.
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 165.271, 0.3162,   800.
*Plastic, rate=0.4047
 56.417,  0.,500.
 226.336, 0.0128,   500.
 236.454, 0.0164,   500.
 247.147, 0.021,  500.
 258.318, 0.0268,   500.
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 175.249, 0.3162,   800.
*Plastic, rate=0.5353
 56.417,  0.,500.
 235.045, 0.0128,   500.
 245.681, 0.0164,   500.
 256.923, 0.021,  500.
 268.666, 0.0268,   500.
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 185.928, 0.3162,   800.
*Plastic, rate=0.7079
 56.417,  0.,500.
 244.194, 0.0128,   500.
 255.375, 0.0164,   500.
 267.192, 0.021,  500.
 279.536, 0.0268,   500.
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 197.343, 0.3162,   800.
*Plastic, rate=0.9363
 56.417,  0.,500.
 253.816, 0.0128,   500.
 265.57, 0.0164,   500.
 277.993, 0.021,  500.
 290.97, 0.0268,   500.
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 209.561, 0.3162,   800.
*Plastic, rate=1.2384
 56.417,  0.,500.
 263.932, 0.0128,   500.
 276.289, 0.0164,   500.
 289.348, 0.021,  500.
 302.99, 0.0268,   500.
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 222.633, 0.3162,   800.
*Plastic, rate=1.6379
 56.417,  0.,500.
 274.565, 0.0128,   500.
 287.554, 0.0164,   500.
 301.283, 0.021,  500.
 315.624, 0.0268,   500.
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 236.614, 0.3162,   800.
*Plastic, rate=2.1663
 56.417,  0.,500.
 285.743, 0.0128,   500.
 299.398, 0.0164,   500.
 313.83, 0.021,  500.
 328.906, 0.0268,   500.
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 251.572, 0.3162,   800.
*Plastic, rate=2.8651
 56.417,  0.,500.
 297.493, 0.0128,   500.
 311.847, 0.0164,   500.
 327.019, 0.021,  500.
 342.867, 0.0268,   500.
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 267.572, 0.3162,   800.
*Plastic, rate=3.7894
 56.417,  0.,500.
 309.845, 0.0128,   500.
 324.935, 0.0164,   500.
 340.884, 0.021,  500.
 357.544, 0.0268,   500.
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 284.69, 0.3162,   800.
*Plastic, rate=5.0119
 56.417,  0.,500.
 322.831, 0.0128,   500.
 338.694, 0.0164,   500.
 355.46, 0.021,  500.
 372.974, 0.0268,   500.
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 303.002, 0.3162,   800.
*Specific Heat
 4.44e+08,  20.
 4.87e+08, 100.
  5.2e+08, 200.
 5.44e+08, 300.
 5.61e+08, 400.
 5.73e+08, 500.
 5.81e+08, 600.
 5.86e+08, 700.
  5.9e+08, 800.
 5.96e+08, 900.
 6.03e+08,1000.
*Material, name=Werkzeugstahl_1_2367
*Conductivity
 29.8, 20.
 33.9,350.
 35.3,700.
*Density
 7.9e-09,
*Elastic
210000., 0.3
*Specific Heat
 5.033e+08,
**
** INTERACTION PROPERTIES
**
*Surface Interaction, name=Kontakt_WS-WZ
*Friction
 0.45,
*Gap Conductance
 0.708,  0.
 0.548, 0.1
 0.437, 0.2
  0.36, 0.3
 0.306, 0.4
 0.268, 0.5
 0.242, 0.6
 0.224, 0.7
 0.211, 0.8
 0.202, 0.9
 0.196,  1.
 0.192, 1.1
 0.189, 1.2
 0.187, 1.3
 0.185, 1.4
 0.184, 1.5
 0.183, 1.6
 0.183, 1.7
 0.183, 1.8
 0.182, 1.9
 0.182,  2.
    0.,  3.
*Gap Conductance, pressure
 0.609, 0.
 2.371, 2.
 2.537, 4.
 2.642, 6.
 2.719, 8.
 2.781,10.
 2.833,12.
 2.878,14.
 2.918,16.
 2.954,18.
 2.986,20.
 3.016,22.
 3.043,24.
 3.068,26.
 3.092,28.
 3.115,30.
 3.136,32.
 3.156,34.
 3.175,36.
 3.193,38.
  3.21,40.
*Gap Heat Generation
1., 0.5
**
** PHYSICAL CONSTANTS
**
*Physical Constants, absolute zero=-273.15, stefan boltzmann=5.67037e-11
**
** BOUNDARY CONDITIONS
**
** Name: Platine_Mitte Type: Displacement/Rotation
*Boundary
Platine_mittenschnitt, 1, 1
** Name: Platine_Scheibenschnitt-1 Type: Displacement/Rotation
*Boundary
Platine_Scheibenschnitt-1, 3, 3
** Name: WZ_Matrize Type: Displacement/Rotation
*Boundary
RP_Matrize, 1, 1
RP_Matrize, 2, 2
RP_Matrize, 3, 3
RP_Matrize, 4, 4
RP_Matrize, 5, 5
RP_Matrize, 6, 6
** Name: WZ_Stempel Type: Displacement/Rotation
*Boundary
RP_Stempel, 1, 1
RP_Stempel, 2, 2
RP_Stempel, 3, 3
RP_Stempel, 4, 4
RP_Stempel, 5, 5
RP_Stempel, 6, 6
**
** INTERACTIONS
**
** Interaction: allg_Kontakt
*Contact, op=NEW
*Contact Inclusions
Matrize_Kontakt , Platine_unten
Stempel_Kontakt , Platine_oben
*Contact Property Assignment
 ,  , Kontakt_WS-WZ
** ----------------------------------------------------------------
**
** STEP: Step-5
**
*Step, name=Step-5, nlgeom=YES
Umformung der Platine
*Dynamic Temperature-displacement, Explicit
, 0.45
*Bulk Viscosity
0.06, 1.2
**
** BOUNDARY CONDITIONS
**
** Name: WZ_Stempel Type: Displacement/Rotation
*Boundary, amplitude=Amp-Stempelweg_Y
RP_Stempel, 1, 1
RP_Stempel, 2, 2, -69.84
RP_Stempel, 3, 3
RP_Stempel, 4, 4
RP_Stempel, 5, 5
RP_Stempel, 6, 6
**
** INTERACTIONS
**
** Interaction: Rad
*Sradiate
Platine_oben_unten, R, 20., 0.75
** Interaction: konv_oben
*Sfilm
Platine_oben, F, 20., 0.00968
** Interaction: konv_unten
*Sfilm
Platine_unten, F, 20., 0.00484
**
** OUTPUT REQUESTS
**
*Restart, write, number interval=1, time marks=NO
**
** FIELD OUTPUT: F-Output-1
**
*Output, field, time interval=0.01
*Node Output
A, NT, RF, RFL, U, V
*Element Output, directions=YES
HFL, LE, PE, PEEQ, S, TEMP
*Contact Output
CSTRESS,
**
** HISTORY OUTPUT: H-Output-1
**
*Output, history, variable=PRESELECT
*End Step
** ----------------------------------------------------------------
**
** STEP: Step-6
**
*Step, name=Step-6, nlgeom=YES
Nachdruecken (aufbringen der Presskraft)
*Dynamic Temperature-displacement, Explicit
, 0.05
*Bulk Viscosity
0.06, 1.2
**
** BOUNDARY CONDITIONS
**
** Name: Platine_Mitte Type: Displacement/Rotation
*Boundary, op=NEW
Platine_mittenschnitt, 1, 1
** Name: Platine_Scheibenschnitt-1 Type: Displacement/Rotation
*Boundary, op=NEW
Platine_Scheibenschnitt-1, 3, 3
** Name: WZ_Matrize Type: Displacement/Rotation
*Boundary, op=NEW
RP_Matrize, 1, 1
RP_Matrize, 2, 2
RP_Matrize, 3, 3
RP_Matrize, 4, 4
RP_Matrize, 5, 5
RP_Matrize, 6, 6
** Name: WZ_Stempel Type: Displacement/Rotation
*Boundary, op=NEW, amplitude=Amp-Stempelweg_Y
RP_Stempel, 1, 1
RP_Stempel, 3, 3
RP_Stempel, 4, 4
RP_Stempel, 5, 5
RP_Stempel, 6, 6
**
** LOADS
**
** Name: Presskraft   Type: Pressure
*Dsload, amplitude=Amp-Presskraft
WZ_Kopfflaeche, P, 11.0
**
** INTERACTIONS
**
** Interaction: Rad
*Sradiate, op=NEW
** Interaction: konv_oben
*Sfilm, op=NEW
** Interaction: konv_unten
*Sfilm, op=NEW
**
** OUTPUT REQUESTS
**
*Restart, write, number interval=1, time marks=NO
**
** FIELD OUTPUT: F-Output-1
**
*Output, field, time interval=0.01
*Node Output
A, NT, RF, RFL, U, V
*Element Output, directions=YES
HFL, LE, PE, PEEQ, S, TEMP
*Contact Output
CSTRESS,
**
** HISTORY OUTPUT: H-Output-1
**
*Output, history, variable=PRESELECT
*End Step
