** 2/3 des Modells zum presshaerten eines Hutprofils
** Loesungsstrategie: Explizit
** Verfahrensschritte: Umformen + Nachdruecken
*Heading
** Job name: WTP-M3_WS1000.0_WZ170.0_p23.0_t10.0 Model name: Model-3_implizit
** Generated by: Abaqus/CAE 2021.HF8
*Preprint, echo=NO, model=NO, history=NO, contact=NO
**
** PARTS
**
**
** ASSEMBLY
**
*Assembly, name=Assembly
**
*Instance, library=WTP-M2_WS1000.0_WZ170.0_p23.0, instance=Platine-1
**
** PREDEFINED FIELD
**
** Name: IMORT_Model-2   Type: Initial State
*Import, state=yes, update=yes
*End Instance
**
*Instance, library=WTP-M2_WS1000.0_WZ170.0_p23.0, instance=WZ_Matrize-1
**
** PREDEFINED FIELD
**
** Name: IMORT_Model-2   Type: Initial State
*Import, state=yes, update=yes
*End Instance
**
*Instance, library=WTP-M2_WS1000.0_WZ170.0_p23.0, instance=WZ_Stempel-1
**
** PREDEFINED FIELD
**
** Name: IMORT_Model-2   Type: Initial State
*Import, state=yes, update=yes
*End Instance
**
*Nset, nset=Blechoberseite, instance=Platine-1
   3,   6,  10,  23, 159, 160
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*Nset, nset=Blechunterseite, instance=Platine-1
  13,  16,  17,  20, 660, 661
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*Elset, elset=Mass-scaling-Elemente, instance=WZ_Stempel-1
 10, 11, 12, 13, 14, 15, 16, 17, 85, 86, 87, 88, 89, 90, 91, 92
*Elset, elset=Mass-scaling-Elemente, instance=WZ_Matrize-1, generate
 60,  67,   1
*Nset, nset=Matrize_UX, instance=WZ_Matrize-1
 147, 148, 149, 150, 156, 157, 158, 159, 169, 170, 463, 464, 531, 532
*Elset, elset=Matrize_UX, instance=WZ_Matrize-1
 162, 186, 211, 224, 302, 305
*Nset, nset=Matrize_UY, instance=WZ_Matrize-1
 167, 168, 169, 170, 175, 176
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*Elset, elset=Matrize_UY, instance=WZ_Matrize-1
 224, 225, 226, 227, 228, 229
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*Nset, nset=Matrize_UZ, instance=WZ_Matrize-1, generate
   1,  764,    1
*Elset, elset=Matrize_UZ, instance=WZ_Matrize-1, generate
   1,  317,    1
*Nset, nset=Platine_Auflage, instance=Platine-1
 13, 14
*Elset, elset=Platine_Auflage, instance=Platine-1
 145, 236
*Nset, nset=Platine_Auswerfer, instance=Platine-1
 10, 11
*Elset, elset=Platine_Auswerfer, instance=Platine-1
 144, 312
*Nset, nset=Platine_Gegenkraft, instance=Platine-1
 13, 14
*Nset, nset=Platine_Scheibenschnitt-1, instance=Platine-1
   2,   3,   5,   6,   9,  10
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*Nset, nset=Platine_mittenschnitt, instance=Platine-1
  5,  6,  7,  8, 15, 16
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*Nset, nset=Stempel_UX, instance=WZ_Stempel-1
   1,   4,   5,   8,  37,  40
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*Elset, elset=Stempel_UX, instance=WZ_Stempel-1
   1,   2,  30,  31,  34,  36
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*Nset, nset=Stempel_UY, instance=WZ_Stempel-1
 151, 152, 153, 154, 441, 442
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*Elset, elset=Stempel_UY, instance=WZ_Stempel-1, generate
 211,  219,    1
*Nset, nset=Stempel_UZ, instance=WZ_Stempel-1
   1,   2,   3,   4,   5,   6
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*Nset, nset=mod_auswerfer, instance=Platine-1
  3,  4,  6,  7, 10, 11
*Elset, elset=mod_auswerfer, instance=Platine-1
   1,  68,  69, 144, 312
*Elset, elset=_Matrize_Kontakt_S4, internal, instance=WZ_Matrize-1
 116, 117, 118, 119, 120, 121
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*Elset, elset=_Matrize_Kontakt_S6, internal, instance=WZ_Matrize-1, generate
 152,  162,    1
*Surface, type=ELEMENT, name=Matrize_Kontakt
_Matrize_Kontakt_S4, S4
_Matrize_Kontakt_S6, S6
*Elset, elset=_Platine_oben_S5, internal, instance=Platine-1, generate
   1,  144,    1
*Elset, elset=_Platine_oben_S1, internal, instance=Platine-1, generate
 312,  334,    1
*Surface, type=ELEMENT, name=Platine_oben
_Platine_oben_S5, S5
_Platine_oben_S1, S1
*Elset, elset=_Platine_oben_unten_S5, internal, instance=Platine-1
   1,   2,   3,   4,   5,   6
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*Elset, elset=_Platine_oben_unten_S2, internal, instance=Platine-1
 145, 146, 147, 148, 149, 150
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*Elset, elset=_Platine_oben_unten_S1, internal, instance=Platine-1, generate
 312,  334,    1
*Surface, type=ELEMENT, name=Platine_oben_unten
_Platine_oben_unten_S5, S5
_Platine_oben_unten_S2, S2
_Platine_oben_unten_S1, S1
*Elset, elset=_Platine_unten_S2, internal, instance=Platine-1
 145, 146, 147, 148, 149, 150
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*Elset, elset=_Platine_unten_S5, internal, instance=Platine-1, generate
 213,  235,    1
*Surface, type=ELEMENT, name=Platine_unten
_Platine_unten_S2, S2
_Platine_unten_S5, S5
*Elset, elset=_Stempel_Kontakt_S5, internal, instance=WZ_Stempel-1, generate
 102,  149,    1
*Surface, type=ELEMENT, name=Stempel_Kontakt
_Stempel_Kontakt_S5, S5
*Elset, elset=_WZ_Kopfflaeche_S2, internal, instance=WZ_Stempel-1, generate
 211,  219,    1
*Surface, type=ELEMENT, name=WZ_Kopfflaeche
_WZ_Kopfflaeche_S2, S2
*End Assembly
*Amplitude, name=Amp-Presskraft
             0.,              0.,            0.01,             0.5,            0.05,              1.
*Amplitude, name=Amp-Stempelweg_Y
             0.,              0.,            0.45,              1.
**
** MATERIALS
**
*Material, name=Stahlblech_22MnB5_Al-Si
*Conductivity
 30.7,  20.
 31.1, 100.
  30., 200.
 27.5, 300.
 21.7, 400.
 23.6, 600.
 25.6, 800.
 27.6,1000.
*Density
 7.83e-09,
*Elastic
212000., 0.284,   20.
207000., 0.286,  100.
199000., 0.289,  200.
193000., 0.293,  300.
166000., 0.298,  400.
158000., 0.303,  500.
150000.,  0.31,  600.
142000., 0.317,  700.
134000., 0.325,  800.
126000., 0.334,  900.
118000., 0.343, 1000.
*Expansion, zero=20.
 1.3e-05,
*Latent Heat
 5.85e+10,350.,375.
*Specific Heat
 4.44e+08,   0.
 4.87e+08, 100.
  5.2e+08, 200.
 5.44e+08, 300.
 5.61e+08, 400.
 5.73e+08, 500.
 5.81e+08, 600.
 5.86e+08, 700.
  5.9e+08, 800.
 5.96e+08, 900.
 6.03e+08,1000.
*Material, name=Werkzeugstahl_1_2367
*Conductivity
 29.8, 20.
 33.9,350.
 35.3,700.
*Density
 7.9e-09,
*Elastic
210000., 0.3
*Specific Heat
 5.033e+08,
**
** INTERACTION PROPERTIES
**
*Surface Interaction, name=Kontakt_WS-WZ
1.,
*Friction, slip tolerance=0.005
 0.45,
*Gap Conductance
 0.708,  0.
 0.548, 0.1
 0.437, 0.2
  0.36, 0.3
 0.306, 0.4
 0.268, 0.5
 0.242, 0.6
 0.224, 0.7
 0.211, 0.8
 0.202, 0.9
 0.196,  1.
 0.192, 1.1
 0.189, 1.2
 0.187, 1.3
 0.185, 1.4
 0.184, 1.5
 0.183, 1.6
 0.183, 1.7
 0.183, 1.8
 0.182, 1.9
 0.182,  2.
    0.,  3.
*Gap Conductance, pressure
 0.609, 0.
 2.371, 2.
 2.537, 4.
 2.642, 6.
 2.719, 8.
 2.781,10.
 2.833,12.
 2.878,14.
 2.918,16.
 2.954,18.
 2.986,20.
 3.016,22.
 3.043,24.
 3.068,26.
 3.092,28.
 3.115,30.
 3.136,32.
 3.156,34.
 3.175,36.
 3.193,38.
  3.21,40.
*Gap Heat Generation
1., 0.5
**
** PHYSICAL CONSTANTS
**
*Physical Constants, absolute zero=-273.15, stefan boltzmann=5.67037e-11
**
** BOUNDARY CONDITIONS
**
** Name: Matrize_X Type: Displacement/Rotation
*Boundary
Matrize_UX, 1, 1
** Name: Matrize_Y Type: Displacement/Rotation
*Boundary
Matrize_UY, 2, 2
** Name: Matrize_Z Type: Displacement/Rotation
*Boundary
Matrize_UZ, 3, 3
** Name: Platine_Mitte Type: Displacement/Rotation
*Boundary
Platine_mittenschnitt, 1, 1
** Name: Platine_Scheibenschnitt-1 Type: Displacement/Rotation
*Boundary
Platine_Scheibenschnitt-1, 3, 3
** Name: Stempel_X Type: Displacement/Rotation
*Boundary
Stempel_UX, 1, 1
** Name: Stempel_Y Type: Displacement/Rotation
*Boundary
Stempel_UY, 2, 2
** Name: Stempel_Z Type: Displacement/Rotation
*Boundary
Stempel_UZ, 3, 3
**
** INTERACTIONS
**
** Interaction: Surf2Surf_oben
*Contact Pair, interaction=Kontakt_WS-WZ, type=SURFACE TO SURFACE
Platine_oben, Stempel_Kontakt
** Interaction: Surf2Surf_unten
*Contact Pair, interaction=Kontakt_WS-WZ, type=SURFACE TO SURFACE
Platine_unten, Matrize_Kontakt
** ----------------------------------------------------------------
**
** STEP: Step-7
**
*Step, name=Step-7, nlgeom=NO, inc=30
Kontaktsuche-1, U2 gesperrt
*Coupled Temperature-displacement, creep=none, deltmx=10.
2e-06, 0.01, 1e-08, 0.005
**
** OUTPUT REQUESTS
**
*Restart, write, frequency=0
**
** FIELD OUTPUT: F-Output-1
**
*Output, field, time interval=0.1
*Node Output
CF, NT, RF, RFL, U
*Element Output, directions=YES
HFL, LE, S, TEMP
*Contact Output
CDISP, CSTRESS
**
** HISTORY OUTPUT: H-Output-1
**
*Output, history, variable=PRESELECT
*End Step
** ----------------------------------------------------------------
**
** STEP: Step-8
**
*Step, name=Step-8, nlgeom=NO, inc=20
Kontaktsuche-2, Presskraft aufbringen
*Coupled Temperature-displacement, creep=none, deltmx=10.
0.01, 0.09, 1e-08, 0.03
**
** BOUNDARY CONDITIONS
**
** Name: Matrize_X Type: Displacement/Rotation
*Boundary, op=NEW
Matrize_UX, 1, 1
** Name: Matrize_Y Type: Displacement/Rotation
*Boundary, op=NEW
Matrize_UY, 2, 2
** Name: Matrize_Z Type: Displacement/Rotation
*Boundary, op=NEW
Matrize_UZ, 3, 3
** Name: Platine_Mitte Type: Displacement/Rotation
*Boundary, op=NEW
Platine_mittenschnitt, 1, 1
** Name: Platine_Scheibenschnitt-1 Type: Displacement/Rotation
*Boundary, op=NEW
Platine_Scheibenschnitt-1, 3, 3
** Name: Stempel_X Type: Displacement/Rotation
*Boundary, op=NEW
Stempel_UX, 1, 1
** Name: Stempel_Y Type: Displacement/Rotation
*Boundary, op=NEW
** Name: Stempel_Z Type: Displacement/Rotation
*Boundary, op=NEW
Stempel_UZ, 3, 3
**
** LOADS
**
** Name: Presskraft   Type: Pressure
*Dsload
WZ_Kopfflaeche, P, 23.0
**
** OUTPUT REQUESTS
**
*Restart, write, frequency=0
**
** FIELD OUTPUT: F-Output-1
**
*Output, field, time interval=0.1
*Node Output
CF, NT, RF, RFL, U
*Element Output, directions=YES
HFL, LE, S, TEMP
*Contact Output
CDISP, CSTRESS
**
** HISTORY OUTPUT: H-Output-1
**
*Output, history, variable=PRESELECT
*End Step
** ----------------------------------------------------------------
**
** STEP: Step-9
**
*Step, name=Step-9, nlgeom=NO, inc=300
Kuehlphase
*Coupled Temperature-displacement, creep=none, deltmx=10.
0.01, 9.9, 0.001, 0.1
**
** OUTPUT REQUESTS
**
*Restart, write, frequency=0
**
** FIELD OUTPUT: F-Output-1
**
*Output, field, time interval=0.1
*Node Output
CF, NT, RF, RFL, U
*Element Output, directions=YES
HFL, LE, S, TEMP
*Contact Output
CDISP, CSTRESS
**
** HISTORY OUTPUT: H-Output-1
**
*Output, history, variable=PRESELECT
*End Step
** ----------------------------------------------------------------
**
** STEP: Step-10
**
*Step, name=Step-10, nlgeom=NO
Form oeffnen
*Coupled Temperature-displacement, creep=none, deltmx=10.
1e-05, 1., 1e-20, 0.1
**
** BOUNDARY CONDITIONS
**
** Name: Stempel_heben Type: Displacement/Rotation
*Boundary
Stempel_UY, 2, 2, 150.
**
** LOADS
**
** Name: Presskraft   Type: Pressure
*Dsload, op=NEW
**
** OUTPUT REQUESTS
**
*Restart, write, frequency=0
**
** FIELD OUTPUT: F-Output-1
**
*Output, field, time interval=0.1
*Node Output
CF, NT, RF, RFL, U
*Element Output, directions=YES
HFL, LE, S, TEMP
*Contact Output
CDISP, CSTRESS
**
** HISTORY OUTPUT: H-Output-1
**
*Output, history, variable=PRESELECT
*End Step
** ----------------------------------------------------------------
**
** STEP: Step-11
**
*Step, name=Step-11, nlgeom=NO
Entformen-1
*Coupled Temperature-displacement, creep=none, deltmx=10.
0.02, 0.1, 0.001, 0.025
**
** BOUNDARY CONDITIONS
**
** Name: Platine_entformung Type: Displacement/Rotation
*Boundary
mod_auswerfer, 2, 2, 148.
**
** INTERACTIONS
**
** Interaction: Surf2Surf_unten
*Model Change, type=CONTACT PAIR, remove
Platine_unten, Matrize_Kontakt
**
** OUTPUT REQUESTS
**
*Restart, write, frequency=0
**
** FIELD OUTPUT: F-Output-1
**
*Output, field, time interval=0.1
*Node Output
CF, NT, RF, RFL, U
*Element Output, directions=YES
HFL, LE, S, TEMP
*Contact Output
CDISP, CSTRESS
**
** HISTORY OUTPUT: H-Output-1
**
*Output, history, variable=PRESELECT
*End Step
** ----------------------------------------------------------------
**
** STEP: Step-12
**
*Step, name=Step-12, nlgeom=NO
Entformen-2
*Coupled Temperature-displacement, creep=none, deltmx=10., stabilize=0.0002, allsdtol=0.05, continue=NO
0.001, 0.1, 1e-10, 0.01
**
** BOUNDARY CONDITIONS
**
** Name: Platine_entformung Type: Displacement/Rotation
*Boundary
mod_auswerfer, 2, 2, 147.5
**
** OUTPUT REQUESTS
**
*Restart, write, frequency=0
**
** FIELD OUTPUT: F-Output-1
**
*Output, field, time interval=0.1
*Node Output
CF, NT, RF, RFL, U
*Element Output, directions=YES
HFL, LE, S, TEMP
*Contact Output
CDISP, CSTRESS
**
** HISTORY OUTPUT: H-Output-1
**
*Output, history, variable=PRESELECT
*End Step
** ----------------------------------------------------------------
**
** STEP: Step-13
**
*Step, name=Step-13, nlgeom=NO, inc=20
Restkuehlen
*Coupled Temperature-displacement, creep=none, deltmx=10.
0.5, 1., 0.1, 1.
**
** BOUNDARY CONDITIONS
**
** Name: Platine_entformung Type: Displacement/Rotation
*Boundary
mod_auswerfer, 2, 2, 75.
**
** INTERACTIONS
**
** Interaction: Surf2Surf_oben
*Model Change, type=CONTACT PAIR, remove
Platine_oben, Stempel_Kontakt
**
** OUTPUT REQUESTS
**
*Restart, write, frequency=0
**
** FIELD OUTPUT: F-Output-1
**
*Output, field
*Node Output
CF, NT, RF, RFL, U
*Element Output, directions=YES
HFL, LE, S, TEMP
*Contact Output
CDISP, CSTRESS
**
** HISTORY OUTPUT: H-Output-1
**
*Output, history, variable=PRESELECT
*End Step
** ----------------------------------------------------------------
**
** STEP: Step-14
**
*Step, name=Step-14, nlgeom=NO, inc=200
Abklingen
*Coupled Temperature-displacement, creep=none, deltmx=10.
3., 240., 1., 24.
**
** BOUNDARY CONDITIONS
**
** Name: Matrize_X Type: Displacement/Rotation
*Boundary, op=NEW
Matrize_UX, 1, 1
** Name: Matrize_Y Type: Displacement/Rotation
*Boundary, op=NEW
Matrize_UY, 2, 2
** Name: Matrize_Z Type: Displacement/Rotation
*Boundary, op=NEW
Matrize_UZ, 3, 3
** Name: Platine_Mitte Type: Displacement/Rotation
*Boundary, op=NEW
Platine_mittenschnitt, 1, 1
** Name: Platine_Scheibenschnitt-1 Type: Displacement/Rotation
*Boundary, op=NEW
Platine_Scheibenschnitt-1, 3, 3
** Name: Platine_entformung Type: Displacement/Rotation
*Boundary, op=NEW
** Name: Stempel_X Type: Displacement/Rotation
*Boundary, op=NEW
Stempel_UX, 1, 1
** Name: Stempel_Z Type: Displacement/Rotation
*Boundary, op=NEW
Stempel_UZ, 3, 3
** Name: Stempel_heben Type: Displacement/Rotation
*Boundary, op=NEW
Stempel_UY, 2, 2, 150.
** Name: hold_WS Type: Displacement/Rotation
*Boundary, op=NEW
Platine_Auswerfer, 2, 2, 75.
**
** INTERACTIONS
**
** Interaction: Platine_rad
*Sradiate
Platine_oben_unten, R, 0., 1.
**
** OUTPUT REQUESTS
**
*Restart, write, frequency=0
**
** FIELD OUTPUT: F-Output-1
**
*Output, field
*Node Output
CF, NT, RF, RFL, U
*Element Output, directions=YES
HFL, LE, S, TEMP
*Contact Output
CDISP, CSTRESS
**
** FIELD OUTPUT: Oberseite_Node_Coord
**
*Output, field, frequency=99999
*Node Output, nset=Blechoberseite
COORD,
**
** FIELD OUTPUT: Unterseite_Node_Coord
**
*Node Output, nset=Blechunterseite
COORD,
**
** HISTORY OUTPUT: H-Output-1
**
*Output, history, variable=PRESELECT
*End Step
